/TITLE, CONTINUUM GROUND STRUCTURE
! File: ex3_11
! Course: MEK 41525
! Element type: PLANE42
! No. of Nodes:       49
! No. of Elements:       32
/PREP7
! Define element type: ET, type #, name
ET,1,PLANE42
R,1, 0.200000000E-01
! Define material property: MP, property, card #, value
MP,EX,1, 0.200000000E+12
MP,PRXY,1, 0.300000000
! Define nodal coordinate: N, node #, x-coord, y-coord, z-coord
N,       1,  0.00000000    , 0.750000000E-01, 0.
N,       2,  0.00000000    , 0.100000000    , 0.
N,       3,  0.00000000    , 0.500000000E-01, 0.
N,       4, 0.250000000E-01, 0.100000000    , 0.
N,       5, 0.250000000E-01, 0.500000000E-01, 0.
N,       6, 0.250632556E-01, 0.749999982E-01, 0.
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N,      49, 0.300000000    ,  0.00000000    , 0.
! Define element connectivity: EN, element #, nodal list
MAT,     1
EN,       1,      28,      26,      23,      29
EN,       2,      29,      35,      34,      28
EN,       3,      35,      42,      41,      34
EN,       4,      35,      36,      43,      42
EN,       5,      29,      32,      36,      35
EN,       6,       4,       2,       1,       6
EN,       7,       6,       8,       7,       4
EN,       8,       1,       3,       5,       6
EN,       9,       6,       5,       9,       8
EN,      10,       9,      12,      11,       8
EN,      11,      11,      10,       7,       8
EN,      12,      12,      15,      14,      11
EN,      13,      14,      13,      10,      11
EN,      14,      15,      18,      17,      14
EN,      15,      17,      16,      13,      14
EN,      16,      18,      21,      20,      17
EN,      17,      20,      19,      16,      17
EN,      18,      23,      22,      19,      20
EN,      19,      26,      25,      22,      23
EN,      20,      28,      30,      25,      26
EN,      21,      34,      33,      30,      28
EN,      22,      41,      40,      33,      34
EN,      23,      41,      46,      45,      40
EN,      24,      42,      47,      46,      41
EN,      25,      43,      48,      47,      42
EN,      26,      43,      44,      49,      48
EN,      27,      36,      39,      44,      43
EN,      28,      32,      38,      39,      36
EN,      29,      23,      24,      27,      29
EN,      30,      29,      27,      31,      32
EN,      31,      32,      31,      37,      38
EN,      32,      20,      21,      24,      23
! Define boundary support conditions: D, node #, dof label, value
D,      37,UY,  0.00000000
D,      49,UX,  0.00000000
D,      49,UY,  0.00000000
D,      44,UY,  0.00000000
D,      39,UY,  0.00000000
D,      38,UY,  0.00000000
! Define nodal load conditions: F, node #, dof label, value
! Define surface load conditions: SFE, element #, face #,PRES, value
SFE,       6,       1,PRES, 0,   6500000.00
SFE,       7,       3,PRES, 0,   6500000.00
SFE,      11,       2,PRES, 0,   6500000.00
SFE,      13,       2,PRES, 0,   6500000.00
SFE,      15,       2,PRES, 0,   6500000.00
SFE,      17,       2,PRES, 0,   6500000.00
SFE,      18,       2,PRES, 0,   6500000.00
SFE,      19,       2,PRES, 0,   6500000.00
SFE,      20,       2,PRES, 0,   6500000.00
SFE,      21,       2,PRES, 0,   6500000.00
SFE,      22,       2,PRES, 0,   6500000.00
SFE,      23,       3,PRES, 0,   6500000.00
FINISH
