/PREP7
/TITLE,
ET,     1,PLANE42
!
! Define node coordinates: N, node #, x-coor, y-coor, z-coor
N,3,0.00000000,0.00000000,0.00000000
N,105,20.0000000,0.00000000,0.00000000
N,6,0.588235294,0.00000000,0.00000000
N,9,1.17647059,0.00000000,0.00000000
N,12,1.76470588,0.00000000,0.00000000
N,15,2.35294118,0.00000000,0.00000000
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N,102,19.4117647,0.500000000,0.00000000
!
! Define element numbering: EN, element #, nodal list
MAT,     1
TYPE,     1
REAL,     1
EN,1,3,6,5,2
EN,2,6,9,8,5
EN,3,9,12,11,8
EN,4,12,15,14,11
EN,5,15,18,17,14
EN,6,18,21,20,17
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EN,68,102,103,99,98
MP,EX,     1,   100000000.0
MP,EY,     1,   100000000.0
MP,PRXY,     1,   0.20000000
R, 		1,  0.05
ACEL,  0.00000000    ,  0.00000000    ,  0.00000000
D,3,UX,0.00000000
D,3,UY,0.00000000
D,3,UZ,0.00000000
D,105,UX,0.00000000
D,105,UY,0.00000000
D,105,UZ,0.00000000
D,99,UX,0.00000000
D,99,UY,0.00000000
D,99,UZ,0.00000000
D,103,UX,0.00000000
D,103,UY,0.00000000
D,103,UZ,0.00000000
D,1,UX,0.00000000
D,1,UY,0.00000000
D,1,UZ,0.00000000
D,2,UX,0.00000000
D,2,UY,0.00000000
D,2,UZ,0.00000000
SFE,     1,     1,PRES,0, -10.0000000
SFE,     2,     1,PRES,0, -10.0000000
SFE,     3,     1,PRES,0, -10.0000000
SFE,     4,     1,PRES,0, -10.0000000
SFE,     5,     1,PRES,0, -10.0000000
SFE,     6,     1,PRES,0, -10.0000000
SFE,     7,     1,PRES,0, -10.0000000
SFE,     8,     1,PRES,0, -10.0000000
SFE,     9,     1,PRES,0, -10.0000000
SFE,    10,     1,PRES,0, -10.0000000
SFE,    11,     1,PRES,0, -10.0000000
SFE,    12,     1,PRES,0, -10.0000000
SFE,    13,     1,PRES,0, -10.0000000
SFE,    14,     1,PRES,0, -10.0000000
SFE,    15,     1,PRES,0, -10.0000000
SFE,    16,     1,PRES,0, -10.0000000
SFE,    17,     1,PRES,0, -10.0000000
SFE,    18,     1,PRES,0, -10.0000000
SFE,    19,     1,PRES,0, -10.0000000
SFE,    20,     1,PRES,0, -10.0000000
SFE,    21,     1,PRES,0, -10.0000000
SFE,    22,     1,PRES,0, -10.0000000
SFE,    23,     1,PRES,0, -10.0000000
SFE,    24,     1,PRES,0, -10.0000000
SFE,    25,     1,PRES,0, -10.0000000
SFE,    26,     1,PRES,0, -10.0000000
SFE,    27,     1,PRES,0, -10.0000000
SFE,    28,     1,PRES,0, -10.0000000
SFE,    29,     1,PRES,0, -10.0000000
SFE,    30,     1,PRES,0, -10.0000000
SFE,    31,     1,PRES,0, -10.0000000
SFE,    32,     1,PRES,0, -10.0000000
SFE,    33,     1,PRES,0, -10.0000000
SFE,    34,     1,PRES,0, -10.0000000
SFE,    35,     1,PRES,0, -10.0000000
SFE,    36,     1,PRES,0, -10.0000000
SFE,    37,     1,PRES,0, -10.0000000
SFE,    38,     1,PRES,0, -10.0000000
SFE,    39,     1,PRES,0, -10.0000000
SFE,    40,     1,PRES,0, -10.0000000
SFE,    41,     1,PRES,0, -10.0000000
SFE,    42,     1,PRES,0, -10.0000000
SFE,    43,     1,PRES,0, -10.0000000
SFE,    44,     1,PRES,0, -10.0000000
SFE,    45,     1,PRES,0, -10.0000000
SFE,    46,     1,PRES,0, -10.0000000
SFE,    47,     1,PRES,0, -10.0000000
SFE,    48,     1,PRES,0, -10.0000000
SFE,    49,     1,PRES,0, -10.0000000
SFE,    50,     1,PRES,0, -10.0000000
SFE,    51,     1,PRES,0, -10.0000000
SFE,    52,     1,PRES,0, -10.0000000
SFE,    53,     1,PRES,0, -10.0000000
SFE,    54,     1,PRES,0, -10.0000000
SFE,    55,     1,PRES,0, -10.0000000
SFE,    56,     1,PRES,0, -10.0000000
SFE,    57,     1,PRES,0, -10.0000000
SFE,    58,     1,PRES,0, -10.0000000
SFE,    59,     1,PRES,0, -10.0000000
SFE,    60,     1,PRES,0, -10.0000000
SFE,    61,     1,PRES,0, -10.0000000
SFE,    62,     1,PRES,0, -10.0000000
SFE,    63,     1,PRES,0, -10.0000000
SFE,    64,     1,PRES,0, -10.0000000
SFE,    65,     1,PRES,0, -10.0000000
SFE,    66,     1,PRES,0, -10.0000000
SFE,    67,     1,PRES,0, -10.0000000
SFE,    68,     1,PRES,0, -10.0000000
FINISH
